*Heading
** Job name: Job-1 Model name: stainlesssteel2dot5mm_yag250um_3600s
** Generated by: Abaqus/CAE 2016
*Preprint, echo=NO, model=NO, history=NO, contact=NO
**
** PARTS
**
*Part, name=Part-1
*End Part
**
*Part, name=Part-2
*End Part
**
**
** ASSEMBLY
**
*Assembly, name=Assembly
**
*Instance, name=Part-1-1, part=Part-1
*Node
      1,           0., 0.0250000004
      2,           0.,           0.
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*Element, type=DC2D4
  1,   1,   8, 241,  91
  2,   8,   9, 242, 241
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*Nset, nset=Set-1, generate
   1,  684,    1
*Elset, elset=Set-1, generate
   1,  565,    1
** Section: Section-1
*Solid Section, elset=Set-1, material=STAINLESS_STEEL
,
*End Instance
**
*Instance, name=Part-2-1, part=Part-2
-0.000249999999999972,     -0.00025,           0.
*Node
      1, 0.000250000012, 0.000250000012
      2, 0.000233934959,           0.
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*Element, type=DC2D4
    1,     1,     8, 11813,  7309
    2,     8,     9, 11814, 11813
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*Nset, nset=Set-1, generate
     1,  21362,      1
*Elset, elset=Set-1, generate
     1,  15456,      1
** Section: Section-2
*Solid Section, elset=Set-1, material=yag
,
*End Instance
**
*Nset, nset=Set-1, instance=Part-1-1, generate
   1,  684,    1
*Nset, nset=Set-1, instance=Part-2-1, generate
     1,  21362,      1
*Elset, elset=Set-1, instance=Part-1-1, generate
   1,  565,    1
*Elset, elset=Set-1, instance=Part-2-1, generate
     1,  15456,      1
*Elset, elset=_in_allumi_S4, internal, instance=Part-1-1, generate
  26,  361,    5
*Elset, elset=_in_allumi_S2, internal, instance=Part-1-1, generate
 370,  565,    5
*Surface, type=ELEMENT, name=in_allumi
_in_allumi_S4, S4
_in_allumi_S2, S2
*Elset, elset=_in_coat_S4, internal, instance=Part-2-1, generate
     1,  10948,      3
*Elset, elset=_in_coat_S1, internal, instance=Part-2-1, generate
 10954,  13203,      1
*Surface, type=ELEMENT, name=in_coat
_in_coat_S4, S4
_in_coat_S1, S1
*Elset, elset=_out_allumin_S1, internal, instance=Part-1-1, generate
 1,  5,  1
*Elset, elset=_out_allumin_S4, internal, instance=Part-1-1, generate
 366,  561,    5
*Elset, elset=_out_allumin_S2, internal, instance=Part-1-1, generate
   5,  365,    5
*Surface, type=ELEMENT, name=out_allumin
_out_allumin_S1, S1
_out_allumin_S4, S4
_out_allumin_S2, S2
*Elset, elset=_out_coat_S3, internal, instance=Part-2-1, generate
 13204,  15456,      1
*Elset, elset=_out_coat_S2, internal, instance=Part-2-1, generate
     3,  10950,      3
*Elset, elset=_out_coat_S4, internal, instance=Part-2-1
 10951, 13204
*Surface, type=ELEMENT, name=out_coat
_out_coat_S3, S3
_out_coat_S2, S2
_out_coat_S4, S4
** Constraint: Constraint-1
*Tie, name=Constraint-1, adjust=yes
out_allumin, in_coat
*End Assembly
**
** MATERIALS
**
*Material, name=STAINLESS_STEEL
*Conductivity
 16.3,
*Density
8000.,
*Specific Heat
500.,
*Material, name=yag
*Conductivity
 1.68,
*Density
4560.,
*Specific Heat
590.,
**
** PHYSICAL CONSTANTS
**
*Physical Constants, absolute zero=0., stefan boltzmann=5.67e-08
**
** PREDEFINED FIELDS
**
** Name: Predefined Field-1   Type: Temperature
*Initial Conditions, type=TEMPERATURE
Set-1, 293.
** ----------------------------------------------------------------
**
** STEP: Step-1
**
*Step, name=Step-1, nlgeom=NO, inc=30000
*Heat Transfer, end=PERIOD, deltmx=100.
2., 3600., 0.0001, 15.,
**
** INTERACTIONS
**
** Interaction: Int-1
*Sfilm
out_coat, F, 375., 6.
** Interaction: Int-2
*Sradiate
out_coat, R, 375., 0.8
** Interaction: Int-3
*Sfilm
in_allumi, F, 308., 3.8
**
** OUTPUT REQUESTS
**
*Restart, write, frequency=0
**
** FIELD OUTPUT: F-Output-1
**
*Output, field, variable=PRESELECT
**
** HISTORY OUTPUT: H-Output-1
**
*Output, history
*Radiation Output
FTEMP,
*End Step
